// COMSOL Multiphysics 5.3.1.201 model "HW3_with.parametric.sweep.mph"
// Outline of the model tree

Parameters
  lambda = 10
  alpha = 1

Geometry
  geom1 "Geometry 1" (2D, length unit m)
    sq1: Square
    ls1: LineSegment | specify1 = coord; coord1 = {0.5, 0.5}; specify2 = coord; coord2 = {1, 1}
    fin: Finalize "Form Union"

Physics
  poeq: PoissonEquation "Poisson's Equation" on all domains
    dependent variable u
    peq1: PoissonEquation "Poisson's Equation 1" (default) | f = -lambda*exp(u/(1+alpha*u)); c = {-1, 0, 0, -1}
    zflx1: ZeroFluxBoundary "Zero Flux 1" (default)
    init1: init "Initial Values 1" (default)
    dir1: DirichletBoundary "Dirichlet Boundary Condition 1" on boundaries 1-3, 5 | r = 0

Mesh
  mesh1 "Mesh 1" (physics-controlled)
    size: MeshSizeDefault | hauto = 4

Studies
  std1 "Study 1"
    param: Parametric "Parametric Sweep" | pname = lambda; plistarr = range(0,0.1,10)
    stat: Stationary

Solver configurations
  sol1 "Solution 1" (study std1)
    v1: Variables "Dependent Variables 1"
    s1: Stationary "Stationary Solver 1"
      dDef: Direct
      p1: Parametric | pname = lambda; plistarr = range(0,0.1,10); pcontinuationmode = no
      fc1: FullyCoupled | linsolver = dDef

Datasets
  dset1: Solution | solution = sol1
  cln1: CutLine2D | data = dset1; genpoints = {{0.5, 0.5}, {1, 1}}

Plots
  pg1: PlotGroup2D "2D Plot Group 1" | data = dset1
    surf1: Surface | data = dset1; expr = u
  pg2: PlotGroup2D "2D Plot Group 2" | data = dset1; xlabel = x; ylabel = y
    con1: Contour | data = dset1; expr = u
  pg3: PlotGroup1D "1D Plot Group 3" | data = dset1
    lngr1: LineGraph | data = cln1; expr = u

Exports
  plot1: Plot | filename = C:\Users\Manos\Desktop\Untitled.txt